// SBML level 3 version 2
// Created with https://github.com/matthiaskoenig/sbmlutils.

model model2()
  // Model 2

  // Compartments:
  compartment liver = 1;

  // Species:
  species gut in liver = 1;
  species cent in liver = 0;
  species peri in liver = 0;

  // Parameters:
  k = 1;
  cl = 1;
  q = 1;
  v_cent = 1;
  v_peri = 1;

  // Reactions:
  // dgut /dt = - k * gut
  R1: gut => gut; -k*gut;
  // dcent/dt = k * gut - (cl/v_cent + q/v_cent)*cent + q/v_peri*peri
  R2: => cent; k*gut - (cl/v_cent + q/v_cent)*cent + q/v_peri*peri;
  // dperi /dt = q/v_cent*cent - q/v_peri*peri
  R3: peri => peri; q/v_cent*cent - q/v_peri*peri;
end
